/PREP7
i=0
start=35
length=10
height=3.5
ratio=0.99
dd=1.8

length1=length
K,i+1,start,start
K,i+2,start+length1,start
K,i+3,start+length1,start+length1
K,i+4,start,start+length1
L,i+1,i+2
L,i+2,i+3
L,i+3,i+4
L,i+4,i+1

dx1=-dd
dy1=-dd
startnum=4
length1=length1*ratio
height1=height
K,i+1+startnum,start+dx1,start+dy1,height1
K,i+2+startnum,start+length1+dx1,start+dy1,height1
K,i+3+startnum,start+length1+dx1,start+length1+dy1,height1
K,i+4+startnum,start+dx1,start+length1+dy1,height1
L,i+1+startnum,i+2+startnum
L,i+2+startnum,i+3+startnum
L,i+3+startnum,i+4+startnum
L,i+4+startnum,i+1+startnum

dx1=dx1-dd
dy1=dy1-dd
startnum=8
height1=2*height
length1=length1*ratio
K,i+1+startnum,start+dx1,start+dy1,height1
K,i+2+startnum,start+length1+dx1,start+dy1,height1
K,i+3+startnum,start+length1+dx1,start+length1+dy1,height1
K,i+4+startnum,start+dx1,start+length1+dy1,height1
L,i+1+startnum,i+2+startnum
L,i+2+startnum,i+3+startnum
L,i+3+startnum,i+4+startnum
L,i+4+startnum,i+1+startnum

dx1=dx1-dd
dy1=dy1-dd
startnum=12
height1=3*height
length1=length1*ratio
K,i+1+startnum,start+dx1,start+dy1,height1
K,i+2+startnum,start+length1+dx1,start+dy1,height1
K,i+3+startnum,start+length1+dx1,start+length1+dy1,height1
K,i+4+startnum,start+dx1,start+length1+dy1,height1
L,i+1+startnum,i+2+startnum
L,i+2+startnum,i+3+startnum
L,i+3+startnum,i+4+startnum
L,i+4+startnum,i+1+startnum


dx1=dx1-dd
dy1=dy1-dd
startnum=16
height1=4*height
length1=length1*ratio
K,i+1+startnum,start+dx1,start+dy1,height1
K,i+2+startnum,start+length1+dx1,start+dy1,height1
K,i+3+startnum,start+length1+dx1,start+length1+dy1,height1
K,i+4+startnum,start+dx1,start+length1+dy1,height1
L,i+1+startnum,i+2+startnum
L,i+2+startnum,i+3+startnum
L,i+3+startnum,i+4+startnum
L,i+4+startnum,i+1+startnum


dx1=dx1-dd
dy1=dy1-dd
startnum=20
height1=5*height
length1=length1*ratio
K,i+1+startnum,start+dx1,start+dy1,height1
K,i+2+startnum,start+length1+dx1,start+dy1,height1
K,i+3+startnum,start+length1+dx1,start+length1+dy1,height1
K,i+4+startnum,start+dx1,start+length1+dy1,height1
L,i+1+startnum,i+2+startnum
L,i+2+startnum,i+3+startnum
L,i+3+startnum,i+4+startnum
L,i+4+startnum,i+1+startnum


dx1=dx1-dd
dy1=dy1-dd
startnum=24
height1=6*height
length1=length1*ratio
K,i+1+startnum,start+dx1,start+dy1,height1
K,i+2+startnum,start+length1+dx1,start+dy1,height1
K,i+3+startnum,start+length1+dx1,start+length1+dy1,height1
K,i+4+startnum,start+dx1,start+length1+dy1,height1
L,i+1+startnum,i+2+startnum
L,i+2+startnum,i+3+startnum
L,i+3+startnum,i+4+startnum
L,i+4+startnum,i+1+startnum

dx1=dx1-dd
dy1=dy1-dd
startnum=28
height1=7*height
length1=length1*ratio
K,i+1+startnum,start+dx1,start+dy1,height1
K,i+2+startnum,start+length1+dx1,start+dy1,height1
K,i+3+startnum,start+length1+dx1,start+length1+dy1,height1
K,i+4+startnum,start+dx1,start+length1+dy1,height1
L,i+1+startnum,i+2+startnum
L,i+2+startnum,i+3+startnum
L,i+3+startnum,i+4+startnum
L,i+4+startnum,i+1+startnum

dx1=dx1-dd
dy1=dy1-dd
startnum=32
height1=8*height
length1=length1*ratio
K,i+1+startnum,start+dx1,start+dy1,height1
K,i+2+startnum,start+length1+dx1,start+dy1,height1
K,i+3+startnum,start+length1+dx1,start+length1+dy1,height1
K,i+4+startnum,start+dx1,start+length1+dy1,height1
L,i+1+startnum,i+2+startnum
L,i+2+startnum,i+3+startnum
L,i+3+startnum,i+4+startnum
L,i+4+startnum,i+1+startnum

dx1=dx1-dd
dy1=dy1-dd
startnum=36
height1=9*height
length1=length1*ratio
K,i+1+startnum,start+dx1,start+dy1,height1
K,i+2+startnum,start+length1+dx1,start+dy1,height1
K,i+3+startnum,start+length1+dx1,start+length1+dy1,height1
K,i+4+startnum,start+dx1,start+length1+dy1,height1
L,i+1+startnum,i+2+startnum
L,i+2+startnum,i+3+startnum
L,i+3+startnum,i+4+startnum
L,i+4+startnum,i+1+startnum


!!!!!!!!!!!!!!!!!!!!!!!!!!!!!!

ratio=0.96
dd=1*2

dx1=dx1-dd
dy1=dy1-dd
startnum=40
height1=11*height
length1=length1*ratio
K,i+1+startnum,start+dx1,start+dy1,height1
K,i+2+startnum,start+length1+dx1,start+dy1,height1
K,i+3+startnum,start+length1+dx1,start+length1+dy1,height1
K,i+4+startnum,start+dx1,start+length1+dy1,height1
L,i+1+startnum,i+2+startnum
L,i+2+startnum,i+3+startnum
L,i+3+startnum,i+4+startnum
L,i+4+startnum,i+1+startnum

dx1=dx1-dd
dy1=dy1-dd
startnum=44
height1=13*height
length1=length1*ratio
K,i+1+startnum,start+dx1,start+dy1,height1
K,i+2+startnum,start+length1+dx1,start+dy1,height1
K,i+3+startnum,start+length1+dx1,start+length1+dy1,height1
K,i+4+startnum,start+dx1,start+length1+dy1,height1
L,i+1+startnum,i+2+startnum
L,i+2+startnum,i+3+startnum
L,i+3+startnum,i+4+startnum
L,i+4+startnum,i+1+startnum

dx1=dx1-dd
dy1=dy1-dd
startnum=48
height1=15*height
length1=length1*ratio
K,i+1+startnum,start+dx1,start+dy1,height1
K,i+2+startnum,start+length1+dx1,start+dy1,height1
K,i+3+startnum,start+length1+dx1,start+length1+dy1,height1
K,i+4+startnum,start+dx1,start+length1+dy1,height1
L,i+1+startnum,i+2+startnum
L,i+2+startnum,i+3+startnum
L,i+3+startnum,i+4+startnum
L,i+4+startnum,i+1+startnum

dx1=dx1-dd
dy1=dy1-dd
startnum=52
height1=17*height
length1=length1*ratio
K,i+1+startnum,start+dx1,start+dy1,height1
K,i+2+startnum,start+length1+dx1,start+dy1,height1
K,i+3+startnum,start+length1+dx1,start+length1+dy1,height1
K,i+4+startnum,start+dx1,start+length1+dy1,height1
L,i+1+startnum,i+2+startnum
L,i+2+startnum,i+3+startnum
L,i+3+startnum,i+4+startnum
L,i+4+startnum,i+1+startnum


dx1=dx1-dd*1.5
dy1=dy1-dd*1.5
startnum=56
height1=20*height
length1=length1*ratio
K,i+1+startnum,start+dx1,start+dy1,height1
K,i+2+startnum,start+length1+dx1,start+dy1,height1
K,i+3+startnum,start+length1+dx1,start+length1+dy1,height1
K,i+4+startnum,start+dx1,start+length1+dy1,height1
L,i+1+startnum,i+2+startnum
L,i+2+startnum,i+3+startnum
L,i+3+startnum,i+4+startnum
L,i+4+startnum,i+1+startnum


!!!!!!!!!!!!!!!!!!!!!!!!!!!!!!!!!!!!!!

ratio=0.95
dd=0.7*2

dx1=dx1-dd
dy1=dy1-dd
startnum=60
height1=height1+2*height
length1=length1*ratio
K,i+1+startnum,start+dx1,start+dy1,height1
K,i+2+startnum,start+length1+dx1,start+dy1,height1
K,i+3+startnum,start+length1+dx1,start+length1+dy1,height1
K,i+4+startnum,start+dx1,start+length1+dy1,height1
L,i+1+startnum,i+2+startnum
L,i+2+startnum,i+3+startnum
L,i+3+startnum,i+4+startnum
L,i+4+startnum,i+1+startnum

dx1=dx1-dd
dy1=dy1-dd
startnum=64
height1=height1+2*height
length1=length1*ratio
K,i+1+startnum,start+dx1,start+dy1,height1
K,i+2+startnum,start+length1+dx1,start+dy1,height1
K,i+3+startnum,start+length1+dx1,start+length1+dy1,height1
K,i+4+startnum,start+dx1,start+length1+dy1,height1
L,i+1+startnum,i+2+startnum
L,i+2+startnum,i+3+startnum
L,i+3+startnum,i+4+startnum
L,i+4+startnum,i+1+startnum

dx1=dx1-dd
dy1=dy1-dd
startnum=68
height1=height1+2*height
length1=length1*ratio
K,i+1+startnum,start+dx1,start+dy1,height1
K,i+2+startnum,start+length1+dx1,start+dy1,height1
K,i+3+startnum,start+length1+dx1,start+length1+dy1,height1
K,i+4+startnum,start+dx1,start+length1+dy1,height1
L,i+1+startnum,i+2+startnum
L,i+2+startnum,i+3+startnum
L,i+3+startnum,i+4+startnum
L,i+4+startnum,i+1+startnum

dx1=dx1-dd
dy1=dy1-dd
startnum=72
height1=height1+2*height
length1=length1*ratio
K,i+1+startnum,start+dx1,start+dy1,height1
K,i+2+startnum,start+length1+dx1,start+dy1,height1
K,i+3+startnum,start+length1+dx1,start+length1+dy1,height1
K,i+4+startnum,start+dx1,start+length1+dy1,height1
L,i+1+startnum,i+2+startnum
L,i+2+startnum,i+3+startnum
L,i+3+startnum,i+4+startnum
L,i+4+startnum,i+1+startnum


dx1=dx1-dd
dy1=dy1-dd
startnum=76
height1=height1+2*height
length1=length1*ratio
K,i+1+startnum,start+dx1,start+dy1,height1
K,i+2+startnum,start+length1+dx1,start+dy1,height1
K,i+3+startnum,start+length1+dx1,start+length1+dy1,height1
K,i+4+startnum,start+dx1,start+length1+dy1,height1
L,i+1+startnum,i+2+startnum
L,i+2+startnum,i+3+startnum
L,i+3+startnum,i+4+startnum
L,i+4+startnum,i+1+startnum

dx1=dx1-dd
dy1=dy1-dd
startnum=80
height1=height1+2*height
length1=length1*ratio
K,i+1+startnum,0,0,height1
K,i+2+startnum,length1,0,height1
K,i+3+startnum,length1,length1,height1
K,i+4+startnum,0,length1,height1
L,i+1+startnum,i+2+startnum
L,i+2+startnum,i+3+startnum
L,i+3+startnum,i+4+startnum
L,i+4+startnum,i+1+startnum


!!!!!!!!!!!!!!!!!!!!!!!!!!!!!!!!!!!!!!!!!!!!!!!!!!
ratio=0.95

*DO,MM,1,11

startnum=80+4*MM
height=height*ratio*1.03
height1=height1+2*height
length1=length1*ratio
K,i+1+startnum,0,0,height1
K,i+2+startnum,length1,0,height1
K,i+3+startnum,length1,length1,height1
K,i+4+startnum,0,length1,height1
L,i+1+startnum,i+2+startnum
L,i+2+startnum,i+3+startnum
L,i+3+startnum,i+4+startnum
L,i+4+startnum,i+1+startnum

*ENDDO

*do,mm,1,124
  L,mm,mm+4
*enddo

!!!!!!!!!!!!!!!!!!!!!!!!!!!!!!!!!!!!!!!!!!!!!!!!!!

startnum=128

height1=height1+0.7*height
K,i+1+startnum,0,0,height1
K,i+2+startnum,length1/2,0,height1
K,i+3+startnum,length1,0,height1
K,i+4+startnum,length1,length1/2,height1
K,i+5+startnum,length1,length1,height1
K,i+6+startnum,length1/2,length1,height1
K,i+7+startnum,0,length1,height1
K,i+8+startnum,0,length1/2,height1

L,i+1+startnum,i+2+startnum
L,i+2+startnum,i+3+startnum
L,i+3+startnum,i+4+startnum
L,i+4+startnum,i+5+startnum
L,i+5+startnum,i+6+startnum
L,i+6+startnum,i+7+startnum
L,i+7+startnum,i+8+startnum
L,i+8+startnum,i+1+startnum


startnum=136

height1=height1+0.7*height
K,i+1+startnum,0,0,height1
K,i+2+startnum,length1/2,0,height1
K,i+3+startnum,length1,0,height1
K,i+4+startnum,length1,length1/2,height1
K,i+5+startnum,length1,length1,height1
K,i+6+startnum,length1/2,length1,height1
K,i+7+startnum,0,length1,height1
K,i+8+startnum,0,length1/2,height1

L,i+1+startnum,i+2+startnum
L,i+2+startnum,i+3+startnum
L,i+3+startnum,i+4+startnum
L,i+4+startnum,i+5+startnum
L,i+5+startnum,i+6+startnum
L,i+6+startnum,i+7+startnum
L,i+7+startnum,i+8+startnum
L,i+8+startnum,i+1+startnum

startnum=144

height1=height1+0.7*height
K,i+1+startnum,0,0,height1
K,i+2+startnum,length1/2,0,height1
K,i+3+startnum,length1,0,height1
K,i+4+startnum,length1,length1/2,height1
K,i+5+startnum,length1,length1,height1
K,i+6+startnum,length1/2,length1,height1
K,i+7+startnum,0,length1,height1
K,i+8+startnum,0,length1/2,height1

L,i+1+startnum,i+2+startnum
L,i+2+startnum,i+3+startnum
L,i+3+startnum,i+4+startnum
L,i+4+startnum,i+5+startnum
L,i+5+startnum,i+6+startnum
L,i+6+startnum,i+7+startnum
L,i+7+startnum,i+8+startnum
L,i+8+startnum,i+1+startnum

K,i+9+startnum,length1*2,0,height1
K,i+10+startnum,length1*2,length1,height1
K,i+11+startnum,length1,length1*2,height1
K,i+12+startnum,0,length1*2,height1

L,i+3+startnum,i+9+startnum
L,i+4+startnum,i+9+startnum
L,i+4+startnum,i+10+startnum
L,i+5+startnum,i+10+startnum
L,i+9+startnum,i+10+startnum
L,i+5+startnum,i+11+startnum
L,i+10+startnum,i+11+startnum
L,i+6+startnum,i+11+startnum
L,i+6+startnum,i+12+startnum
L,i+7+startnum,i+12+startnum
L,i+11+startnum,i+12+startnum

L,153,122
L,123,154
L,123,155
L,124,156

L,153,126
L,127,154
L,127,155
L,128,156

L,125,129
L,126,131
L,127,133
L,128,135

L,132,126
L,132,127
L,132,139,
L,132,141

L,140,131
L,140,133
L,140,147
L,140,149

L,148,139
L,148,141

L,134,128
L,134,127
L,134,143
L,134,141

L,142,135
L,142,133
L,142,149
L,142,151

L,131,139
L,133,141
L,135,143
L,137,129

L,137,145
L,143,151
L,141,149
L,139,147

!!!!!!!!!!!!!!!!!!!!!!!!!!!!!!!!!!!!!!!!!!!!!!!!!!!!


ratio=0.9

*DO,MM,1,20

startnum=152+4*MM
height1=height1+height
length1=length1*ratio
K,i+1+startnum,0,0,height1
K,i+2+startnum,length1,0,height1
K,i+3+startnum,length1,length1,height1
K,i+4+startnum,0,length1,height1
L,i+1+startnum,i+2+startnum
L,i+2+startnum,i+3+startnum
L,i+3+startnum,i+4+startnum
L,i+4+startnum,i+1+startnum

*ENDDO


L,145,157
L,147,158
L,149,159
L,151,160

*do,mm,157,232
  L,mm,mm+4
*enddo


!!!!!!!!!!!!!!!!!!!!!!!!!!!!!!!!!!
/PREP7

startnum=236
*do,m,1,9
  K,startnum+m,KX(40)/9*(m-1),KY(40),KZ(40)
  K,startnum+9+m,KX(37)/9*(m-1),KY(37),KZ(37)
*ENDDO

stratnum=236
*do,m,1,8
  L,stratnum+m,stratnum+m+1
*ENDDO

L,236+9,40

stratnum=236+9
*do,m,1,8
  L,stratnum+m,stratnum+m+1
*ENDDO

L,236+18,37

!!!!!!!!!!!!!!!!!!!!!!


startnum=254
*do,m,1,9
  K,startnum+m,KX(37),KY(37)/9*(m-1),KZ(37)
  K,startnum+9+m,KX(38),KY(38)/9*(m-1),KZ(38)
*ENDDO

stratnum=254
*do,m,1,8
  L,stratnum+m,stratnum+m+1
*ENDDO

L,254+9,37

stratnum=254+9
*do,m,1,8
  L,stratnum+m,stratnum+m+1
*ENDDO

L,254+18,38


!!!!!!!!!!!!!!!!!!!!!!!!!!!!!!!!!!!circle

/PREP7
startnum=272

RRRR=28
K,startnum+1,0,KY(4),0
K,startnum+2,0,KY(4)+1,0.54
K,startnum+3,0,KY(28),KZ(28)

CIRCLE, startnum+1,RRRR+1,startnum+2,startnum+3,90,15
CIRCLE, startnum+1,RRRR+4,startnum+2,startnum+3,60,10

L,302,20

/PREP7
*GET,startnum,KP, 0,NUM,MAX

RRRR=28
K,startnum+1,KX(2),0,0
K,startnum+2,KX(2)+1,0,0.54
K,startnum+3,KX(26),0,KZ(26)

CIRCLE, startnum+1,RRRR+1,startnum+2,2,90,15
CIRCLE, startnum+1,RRRR+4,startnum+2,18,60,10

*GET,startnum,KP, 0,NUM,MAX
K,startnum+1,KX(332),0,KZ(332)

L,startnum+1,332

!!!!!!!!!!!!!!!!!!!!!!!!!!!!!!!!!!!!!!!!!!!CRICLE END

/PREP7

*GET,startnum,KP, 0,NUM,MAX

*do,m,1,9
  K,startnum+m,KX(36)/9*(m-1),KY(36),KZ(36)
  K,startnum+9+m,KX(33)/9*(m-1),KY(33),KZ(33)
*ENDDO

startnum=startnum
*do,m,2,8
  L,startnum+m,startnum+m+1
*ENDDO

L,startnum+9,36

startnum=startnum+9
*do,m,1,8
  L,startnum+m,startnum+m+1
*ENDDO

L,startnum+9,33


*GET,startnum,KP, 0,NUM,MAX

*do,m,1,9
  K,startnum+m,KX(33),KY(33)/9*(m-1),KZ(33)
  K,startnum+9+m,KX(34),KY(34)/9*(m-1),KZ(34)
*ENDDO

*do,m,1,8
  L,startnum+m,startnum+m+1
*ENDDO

L,startnum+9,33

startnum=startnum+9
*do,m,2,8
  L,startnum+m,startnum+m+1
*ENDDO

L,startnum+9,34

L,335,292
L,362,333
L,322,18
!!!!!!!!!!!!!!!!!!!!!!!!!!!!!!!!!

/PREP7
*GET,startnum,KP, 0,NUM,MAX

*do,m,1,11
  K,startnum+9+m,KX(38),KY(38)/9*(m-2),KZ(38)+4
*ENDDO

*do,m,1,10
  K,startnum+m,KX(40)/9*(m-1),KY(40),KZ(40)+4
*ENDDO


*do,m,1,9
  L,380+m-1,380+m
*ENDDO

*do,m,1,9
  L,370+m-1,370+m
*ENDDO

!!!!!!!!!!!!!!!!!!!!!!!!!!!!!!!!!!!!


L,389,38
L,380,264
L,379,40
L,370,237
L,42,389
L,44,379


!!!!!!!!!!!!!!!!!!!!!!!!!!!!!!!!!!!!!!!!!!


/PREP7

*GET,startnum,KP, 0,NUM,MAX

*do,m,1,9
  K,startnum+m,KX(53)/9*(m-1),KY(53),KZ(53)
  K,startnum+9+m,KX(56)/9*(m-1),KY(56),KZ(56)
*ENDDO


*do,m,1,8
  L,startnum+m,startnum+m+1
*ENDDO

L,startnum+9,53

startnum=startnum+9
*do,m,1,8
  L,startnum+m,startnum+m+1
*ENDDO

L,startnum+9,56


*GET,startnum,KP, 0,NUM,MAX

*do,m,1,9
  K,startnum+m,KX(53),KY(53)/9*(m-1),KZ(53)
  K,startnum+9+m,KX(54),KY(54)/9*(m-1),KZ(54)
*ENDDO

*do,m,1,8
  L,startnum+m,startnum+m+1
*ENDDO

L,startnum+9,53

startnum=startnum+9
*do,m,1,8
  L,startnum+m,startnum+m+1
*ENDDO

L,startnum+9,54


!!!!!!!!!!!!!!!!!!!!!!!!!!!!!!!!!!!!!!

/PREP7

*GET,startnum,KP, 0,NUM,MAX

*do,m,1,9
  K,startnum+m,KX(53)/9*(m-1),KY(53),KZ(53)
  K,startnum+9+m,KX(56)/9*(m-1),KY(56),KZ(56)
*ENDDO


*do,m,1,8
  L,startnum+m,startnum+m+1
*ENDDO

L,startnum+9,53

startnum=startnum+9
*do,m,1,8
  L,startnum+m,startnum+m+1
*ENDDO

L,startnum+9,56


*GET,startnum,KP, 0,NUM,MAX

*do,m,1,9
  K,startnum+m,KX(53),KY(53)/9*(m-1),KZ(53)
  K,startnum+9+m,KX(54),KY(54)/9*(m-1),KZ(54)
*ENDDO

*do,m,1,8
  L,startnum+m,startnum+m+1
*ENDDO

L,startnum+9,53

startnum=startnum+9
*do,m,1,8
  L,startnum+m,startnum+m+1
*ENDDO

L,startnum+9,54


!!!!!!!!!!!!!!!!!!!!!!!!!!!!!!!!!!!!!!


/PREP7
*GET,startnum,KP, 0,NUM,MAX

*do,m,1,10
  K,startnum+9+m,KX(53),KY(53)/9*(m-2),KZ(53)-2
*ENDDO

*do,m,1,10
  K,startnum+m,KX(53)/9*(m-1),KY(53),KZ(53)-2
*ENDDO


*do,m,1,8
  L,472+m-1,472+m
*ENDDO

*do,m,1,9
  L,462+m-1,462+m
*ENDDO

L,471,480
L,53,471

!!!!!!!!!!!!!!!!!!!!!!!!!!!!!!!!!!!

L,43,379
L,43,389

!!!!!!!!!!!!!!!!!!!!!!!!!!!!!!!!!!


*DO,mmm,1,117,4
  L,mmm,mmm+5
  L,mmm,mmm+7
*ENDDO

*DO,mmm,2,118,4
  L,mmm,mmm+5
  L,mmm,mmm+3
*ENDDO

*DO,mmm,3,119,4
  L,mmm,mmm+5
  L,mmm,mmm+3
*ENDDO

*DO,mmm,4,120,4
  L,mmm,mmm+1
  L,mmm,mmm+3
*ENDDO

!!!!!!!!!!!!!!!!!!!!!!!!!!!!!!!!!!!!!!

L,2,308
L,6,308
L,10,308
L,10,309
L,14,309
L,14,310
L,14,311
L,18,310
L,18,311
L,323,312
L,324,313
L,325,314
L,326,315
L,327,316
L,328,317
L,329,318
L,330,319
L,331,320
L,333,321

L,10,310
L,309,6

L,364,330
L,366,329
L,367,328
L,369,327
L,34,326
L,365,329
L,366,328
L,367,327
L,369,326
L,326,30
L,325,30
L,26,325
L,324,26
L,22,324
L,22,323
L,34,327
L,34,325
L,369,328
L,309,6

!!!!!!!!!!!!!!!!!!!!!!!!!!!!!!!!!!!!!

L,289,4
L,289,8
L,289,12
L,288,8
L,288,12
L,288,16
L,287,12
L,287,16
L,287,20
L,286,16
L,286,20
L,285,301
L,284,300
L,283,299
L,282,298
L,281,297
L,280,296
L,279,295
L,278,294
L,277,293
L,276,292


!!!!!!!!!!!!!!!!!!!!!!!!!!!!!!!!!!!!!

L,301,24
L,300,24
L,300,28
L,299,28
L,299,32
L,299,36
L,298,32
L,298,36
L,298,342
L,297,36
L,297,342
L,297,340
L,296,342
L,296,339
L,296,340
L,295,339
L,295,338
L,294,337

LDELE,548
LDELE,549
LDELE,535
LDELE,536

!!!!!!!!!!!!!!!!!!!!!!!!!!!!!!!!!!!!!!

!L,292,343
!L,237,246
!L,246,343
!L,292,237


*DO,iii,335,342
   L,iii,iii-100+3
*ENDDO

*DO,iii,362,369
   L,iii,iii-100+3
*ENDDO

*DO,iii,237,245
   L,iii,iii+134
*ENDDO

*DO,iii,238,245
   L,iii,iii+132
*ENDDO

*DO,iii,238,245
   L,iii,iii+133
*ENDDO

L,40,378

!!!!!!!!!!!!!!!!!!!!!!!!!!!

*DO,iii,264,272
   L,iii,iii+117
*ENDDO

*DO,iii,265,272
   L,iii,iii+115
   L,iii,iii+116
*ENDDO

L,38,388

!!!!!!!!!!!!!!!!!!!!!!!!!!!!!!

*DO,iii,353,360
   !L,iii,iii-91
   L,iii,iii-97
*ENDDO

*DO,iii,256,263
   L,iii,iii+9
   L,iii,iii+125
*ENDDO


!!!!!!!!!!!!!!!!!!!!!!!!!!!!!!!!!!!!!!!

*DO,iii,247,254
   L,iii,iii-9
   L,iii,iii+124
*ENDDO

*DO,iii,344,351
   L,iii,iii-9
*ENDDO

*DO,iii,353,360
   L,iii,iii+9
*ENDDO


!!!!!!!!!!!!!!!!!!!!!!!!!!!!!


*DO,iii,454,461
   L,iii,iii+19
*ENDDO

*DO,iii,454,461
   L,iii,iii-45
*ENDDO

*DO,iii,454,461
   L,iii,iii-45
*ENDDO

*DO,iii,473,480
   L,iii,iii-64
*ENDDO

*DO,iii,400,407
   L,iii,iii-9
   L,iii,iii+63
*ENDDO

*DO,iii,463,470
   L,iii,iii-72
*ENDDO

*DO,iii,462,469
   L,iii,iii-62
*ENDDO

*DO,iii,399,406
   L,iii,iii+64
*ENDDO

L,56,470
L,56,471
L,407,471

*DO,iii,417,424
   L,iii,iii+56
*ENDDO

*DO,iii,418,425
   L,iii,iii+54
*ENDDO

L,471,425
L,471,54
L,54,480

!!!!!!!!!!!!!!!!!!!!!!!!!!!!!!!1

LSYMM,Y,ALL
LSYMN,X,ALL

!!!!!!!!!!!!!!!!!!!!!!!!!!!!!!!!!!!!!!!!!!!!!!!!!

L,767,1654
L,1703,718
L,813,1663
L,1749,727

L,362,745
L,830,265
L,822,256
L,353,736

L,335,1186
L,1235,238
L,1281,247
L,344,1195

L,1298,1681
L,1766,1213
L,1758,1204
L,1290,1672

L,1399,931
L,1867,473
L,1876,463
L,940,1408

L,1469,53
L,533,1001

!!!!!!!!!!!!!!!!!!!!!!!!!!!!!


*DO,iii,83,115,4
   L,iii,iii+1416
*ENDDO

*DO,iii,563,603,4
   L,iii,iii+468
*ENDDO


/prep7
ET,1,BEAM188

SECTYPE,1,BEAM,rect
SECDATA,0.4,0.4,1,1
MP,EX,1,712700
MP,NUXY,1,0.01


ESIZE,30
LMESH,ALL

/SOLU
NSEL,s,loc,Z,0
d,all,uz,1987.05
d,all,ux,0
d,all,uy,0
d,all,rotz,0
d,all,rotx,0
d,all,roty,0
allsel

NSEL,s,loc,Z,KZ(235)
d,all,uz,2011.05
d,all,ux,0
d,all,uy,0
d,all,rotz,0
d,all,rotx,0
d,all,roty,0
allsel

solve

/POST1
PLNSOL, U,Z, 0,1.0
/ESHAPE,1
/gline,all,-1

/CONT,1,9,1987.05, ,2011.05

/VIEW, 1,  0.498965405430    , -0.804639740886    ,  0.321851536537
/ANG,  1,  -62.6849054799
/REPLO
